// COMSOL Multiphysics 5.1.0.234 model "Abrikosov_lattice.mph"
// Outline of the model tree

Parameters
  T = 0[K]  // Temperature
  SCw = 10  // SC width
  SCh = 10  // SC height
  Ba = 0.75  // Applied magnetic field
  I = 0  // Current
  sigma = 4  // bulk conductivity above Tcrit
  kappa = 6  // G-L parameter
  R = SCw/50  // pin radius
  w = SCw/250  // pin anullus width
  x01 = -8  // 1st pin
  y01 = -8
  x02 = -4.8  // 2nd pin
  y02 = -8
  x03 = -1.6  // 3rd pin
  y03 = -8
  x04 = 1.6  // 4th pin
  y04 = -8
  x05 = 4.8  // 5th pin
  y05 = -8
  x06 = 8  // 6th pin
  y06 = -8
  x07 = -6.4  // 7th pin
  y07 = -5.4
  x08 = 0  // 8th pin
  y08 = -5.4
  x09 = 6.4  // 9th pin
  y09 = -5.4
  x010 = -8  // 10th pin
  y010 = -2.45
  x011 = -4.8
  y011 = -2.45
  x012 = -1.6
  y012 = -2.45
  x013 = 1.6
  y013 = -2.45
  x014 = 4.8
  y014 = -2.45
  x015 = 8
  y015 = -2.45
  x016 = -6.4
  y016 = 0.15
  x017 = 0
  y017 = 0.15
  x018 = 6.4
  y018 = 0.15
  x019 = -8  // 19th pin
  y019 = 3.1
  x020 = -4.8
  y020 = 3.1
  x021 = -1.6
  y021 = 3.1
  x022 = 1.6
  y022 = 3.1
  x023 = 4.8
  y023 = 3.1
  x024 = 8
  y024 = 3.1

Functions
  extm1: MATLAB "Pinning" (disabled) | funcs = {PinningFunc, "arg1, arg2, arg3"}

Variables
  var1 "Variables 1"
    kappa2 = kappa^2
    Je = I/SCh  // current density x-direction
    B = Ba+Je*y  // Total magnetic field
    Jsx = ((u1-i*u2)*(u1x+i*u2x)-(u1+i*u2)*(u1x-i*u2x))/2/i/kappa-(u1^2+u2^2)*u3  // super_current density
    Jsy = ((u1-i*u2)*(u1y+i*u2y)-(u1+i*u2)*(u1y-i*u2y))/2/i/kappa-(u1^2+u2^2)*u4
    Jnx = -sigma*u3t  // normal curren density
    Jny = -sigma*u4t
    f1 = tanh((sqrt((x-x01)^2+(y-y01)^2)-R)/w)  // 1st pinning site
    f2 = tanh((sqrt((x-x02)^2+(y-y02)^2)-R)/w)  // 2nd pinning site
    f3 = tanh((sqrt((x-x03)^2+(y-y03)^2)-R)/w)  // 3rd pinning site
    f4 = tanh((sqrt((x-x04)^2+(y-y04)^2)-R)/w)  // 4th pinning site
    f5 = tanh((sqrt((x-x05)^2+(y-y05)^2)-R)/w)  // 5th pinning site
    f6 = tanh((sqrt((x-x06)^2+(y-y06)^2)-R)/w)  // 6th pinning site
    f7 = tanh((sqrt((x-x07)^2+(y-y07)^2)-R)/w)  // 7th pinning site
    f8 = tanh((sqrt((x-x08)^2+(y-y08)^2)-R)/w)  // 8th pinning site
    f9 = tanh((sqrt((x-x09)^2+(y-y09)^2)-R)/w)  // 9th pinning site
    f10 = tanh((sqrt((x-x010)^2+(y-y010)^2)-R)/w)  // 10th pinning site
    f11 = tanh((sqrt((x-x011)^2+(y-y011)^2)-R)/w)  // 11th pinning site
    f12 = tanh((sqrt((x-x012)^2+(y-y012)^2)-R)/w)  // 12th pinning site
    f13 = tanh((sqrt((x-x013)^2+(y-y013)^2)-R)/w)  // 13th pinning site
    f14 = tanh((sqrt((x-x014)^2+(y-y014)^2)-R)/w)  // 14th pinning site
    f15 = tanh((sqrt((x-x015)^2+(y-y015)^2)-R)/w)  // 15th pinning site
    f16 = tanh((sqrt((x-x016)^2+(y-y016)^2)-R)/w)  // 16th pinning site
    f17 = tanh((sqrt((x-x017)^2+(y-y017)^2)-R)/w)  // 17th pinning site
    f18 = tanh((sqrt((x-x018)^2+(y-y018)^2)-R)/w)  // 18th pinning site
    f19 = tanh((sqrt((x-x019)^2+(y-y019)^2)-R)/w)  // 19th pinning site
    f20 = tanh((sqrt((x-x020)^2+(y-y020)^2)-R)/w)  // 20th pinning site
    f21 = tanh((sqrt((x-x021)^2+(y-y021)^2)-R)/w)  // 21th pinning site
    f22 = tanh((sqrt((x-x022)^2+(y-y022)^2)-R)/w)  // 22th pinning site
    f23 = tanh((sqrt((x-x023)^2+(y-y023)^2)-R)/w)  // 23th pinning site
    f24 = tanh((sqrt((x-x024)^2+(y-y024)^2)-R)/w)  // 24th pinning site
    f = f1*f2*f3*f4*f5*f6*f7*f8*f9*f10*f11*f12*f13*f14*f15*f16*f17*f18*f19*f20*f21*f22*f23*f24  // pinning function

Probes
  dom1: Domain "Total energy" on domains 1
    type = integral
    probename = Etot
    expr = ((u1x^2+u2y^2)/kappa^2-(u1^2+u2^2)+0.5*(u1^2+u2^2)^2+(Ba-u4x-u3y)^2+1/kappa*((u2x*u1-u1x*u2)*u3+(u2y*u1-u1y*u2)*u4)+(u3^2+u4^2)*(u1^2+u2^2))
    table = tbl2
  dom4: Domain "Superconducting energy" on domains 1
    type = integral
    probename = Esup
    expr = (u1x^2+u2y^2)/kappa^2-(u1^2+u2^2)+0.5*(u1^2+u2^2)^2
    table = tbl3
  dom2: Domain "Magnetic energy" on domains 1 | type = integral; probename = Emag; expr = (Ba-u4x-u3y)^2; table = tbl4
  dom3: Domain "Interaction energy" on domains 1
    type = integral
    probename = Eint
    expr = 1/kappa*((u2x*u1-u1x*u2)*u3+(u2y*u1-u1y*u2)*u4)+(u3^2+u4^2)*(u1^2+u2^2)
    table = tbl5

Coordinate systems
  sys1: Boundary "Boundary System 1" | coord = {x, y, t}; reversenormal = off

Geometry
  geom1 "Geometry 1" (2D, length unit m)
    r1: Rectangle | pos = {-10, -10}; type = solid; base = corner; size = {20, 15}
    b1: BezierPolygon "Indentation_right" (disabled)
      p = {{SCw/2, SCw/4, SCw/4, SCw/2}, {SCh/100, SCh/100, -SCh/100, -SCh/100}}
      degree = {1, 1, 1}
      w = {1, 1, 1, 1, 1, 1}
      type = open
    b4: BezierPolygon "Indentation_left1" (disabled)
      p = {{-SCw/2, -SCw/4, -SCw/4, -SCw/2}, {SCw/100, SCw/100, -SCw/100, -SCw/100}}
      degree = {1, 1, 1}
      w = {1, 1, 1, 1, 1, 1}
      type = open
    b5: BezierPolygon "Indentation_up" (disabled)
      p = {{-SCw/100, -SCw/100, SCw/100, SCw/100}, {SCh/2, SCh/4, SCw/4, SCw/2}}
      degree = {1, 1, 1}
      w = {1, 1, 1, 1, 1, 1}
      type = open
    b6: BezierPolygon "Indentation_down" (disabled)
      p = {{-SCw/100, -SCw/100, SCw/100, SCw/100}, {-SCh/2, -SCh/4, -SCw/4, -SCw/2}}
      degree = {1, 1, 1}
      w = {1, 1, 1, 1, 1, 1}
      type = open
    sq1: Square (disabled) | base = center; size = SCw/2
    c1: Circle (disabled) | pos = {0, 0}; type = solid; base = center; r = 10
    c2: Circle (disabled) | pos = {0, 0}; type = solid; base = center; r = 8
    c3: Circle (disabled) | pos = {0, 0}; type = solid; base = center; r = 2
    b3: BezierPolygon "deltoid" (disabled)
      p = {{0, 0, 4, 0, -4, 0}, {-8, -4, 0, 4, 0, -4}}
      degree = {1, 1, 1, 1, 1}
      w = {1, 1, 1, 1, 1, 1, 1, 1, 1, 1}
      type = open
    e1: Ellipse (disabled) | pos = {-5, 0}; type = solid; base = center; semiaxes = {6, 6}
    e2: Ellipse (disabled) | pos = {5, 0}; type = solid; base = center; semiaxes = {6, 6}
    b7: BezierPolygon "Hexagon" (disabled)
      p = 
        {-SCw/2, -SCw/4, SCw/4, SCw/2, SCw/4, -SCw/4, -SCw/2}
        {0, SCw/4*sqrt(3), SCw/4*sqrt(3), 0, -SCw/4*sqrt(3), -SCw/4*sqrt(3), 0}
      degree = {1, 1, 1, 1, 1, 1}
      w = {1, 1, 1, 1, 1, 1, 1, 1, 1, 1, 1, 1}
      type = solid
    b8: BezierPolygon "Hexagon 1" (disabled)
      p = 
        {-SCw/8, -SCw/16, SCw/16, SCw/8, SCw/16, -SCw/16, -SCw/8}
        {0, SCw/16*sqrt(3), SCw/16*sqrt(3), 0, -SCw/16*sqrt(3), -SCw/16*sqrt(3), 0}
      degree = {1, 1, 1, 1, 1, 1}
      w = {1, 1, 1, 1, 1, 1, 1, 1, 1, 1, 1, 1}
      type = solid
    c4: Circle "defect1" (disabled) | pos = {-1, 1}; type = solid; base = center; r = 0.2
    c5: Circle "defect2" (disabled) | pos = {1, -1}; type = solid; base = center; r = 0.2
    fin: Finalize "Form Union"
    cme1: CompositeEdges "Form Composite Edges 1" (disabled) | keepformesh = off
  part1 "Part 1" (2D, length unit m)

Materials
  mat1: Common "Material 1"
    def "Basic"
      electricconductivity = 3e3

Physics
  g: GeneralFormPDE on domains 1
    dependent variable u = {u1, u2, u3, u4, u5}
    Units.SourceTermQuantity = dimensionless
    gfeq1: GeneralFormPDE (default)
      f = {(u3x+u4y)*u2/kappa+2*(u2x*u3+u2y*u4)/kappa-(u3^2+u4^2)*u1+f*u1-(u1^2+u2^2)*u1, -(u3x+u4y)*u1/kappa-2*(u1x*u3+u1y*u4)/kappa-(u3^2+u4^2)*u2+f*u2-(u1^2+u2^2)*u2, (u1*u2x-u2*u1x)/kappa-(u1^2+u2^2)*u3, (u1*u2y-u2*u1y)/kappa-(u1^2+u2^2)*u4, u3x+u4y+u5}
      Ga = {{-u1x/kappa2, -u1y/kappa2}, {-u2x/kappa2, -u2y/kappa2}, {0, u4x-u3y-B}, {-u4x+u3y+B, 0}, {u3, u4}}
      da = {1, 0, 0, 0, 0, 0, 1, 0, 0, 0, 0, 0, sigma, 0, 0, 0, 0, 0, sigma, 0, 0, 0, 0, 0, 0}
    zflx1: ZeroFluxBoundary "Vacuum boundary" (default)
    init1: init "Initial Values 1" (default)
      u1 = 1/sqrt(2)
      u2 = 1/sqrt(2)
      u3 = 0
      u4 = 0
      u1t = 0
      u2t = 0
      u3t = 0
      u4t = 0
      u5 = 0
      u5t = 0
      B = Ba
    dir1: DirichletBoundary "Metal contact left" (disabled) on boundaries 1, 4
      r = {0, 0, -Je/sigma*t, -B*SCw/2, 0}
      useDirichletCondition = {1, 1, 1, 0, 0}
      constraintType = unidirectionalConstraint
    dir2: DirichletBoundary "Metal contact right" (disabled) on boundaries 4
      r = {0, 0, -Je/sigma*t, B*SCw/2, 0}
      useDirichletCondition = {1, 1, 1, 0, 0}
      constraintType = unidirectionalConstraint

Mesh
  mesh1 "Mesh 1"
    size: MeshSizeDefault
      table = default
      hmax = 1.06
      hmin = 0.006
      hcurve = 0.3
      hnarrow = 1
      hgrad = 1.3
      hauto = 4
      custom = off
    fq1: FreeQuad (disabled) on remaining entities | smoothmaxiter = 20; smoothmaxdepth = 20
    ftri1: FreeTri "Free Triangular 1" on remaining entities

Studies
  std2 "Study 2"
    param1: Parametric "Sweep" (disabled) | sweeptype = filled; pname = Ba; plistarr = range(1.5,0.05,3)
    time: Transient "Time Dependent" | tlist = range(0,1,20); initmethod = sol; initstudy = zero

Solver configurations
  sol1 "Solution 1" (study std2)
    v1: Variables "Dependent Variables 1"
    t1: Time "Time-Dependent Solver 1" | tlist = range(0,1,20)
      dDef: Direct
      fc1: FullyCoupled | linsolver = dDef

Datasets
  dset1: Solution | solution = none
  dset2: Solution "Probe Solution 2" | solution = sol1
  int1: Integral "Total energy" on domains 1 | data = dset2
  int2: Integral "Superconducting energy" on domains 1 | data = dset2
  int3: Integral "Magnetic energy" on domains 1 | data = dset2
  int4: Integral "Interaction energy" on domains 1 | data = dset2
  dset3: Solution | solution = sol1

Derived values
  pev1: EvalPoint "Total energy"
    data = int1
    table = tbl2
    expr = ((u1x^2+u2y^2)/kappa^2-(u1^2+u2^2)+0.5*(u1^2+u2^2)^2+(Ba-u4x-u3y)^2+1/kappa*((u2x*u1-u1x*u2)*u3+(u2y*u1-u1y*u2)*u4)+(u3^2+u4^2)*(u1^2+u2^2))
  pev2: EvalPoint "Superconducting energy"
    data = int2
    table = tbl3
    expr = (u1x^2+u2y^2)/kappa^2-(u1^2+u2^2)+0.5*(u1^2+u2^2)^2
  pev3: EvalPoint "Magnetic energy" | data = int3; table = tbl4; expr = (Ba-u4x-u3y)^2
  pev4: EvalPoint "Interaction energy"
    data = int4
    table = tbl5
    expr = 1/kappa*((u2x*u1-u1x*u2)*u3+(u2y*u1-u1y*u2)*u4)+(u3^2+u4^2)*(u1^2+u2^2)

Tables
  tbl2: Table "Probe Table 2"
    t | ((u1x^2+u2y^2)/kappa^2-(u1^2+u2^2)+0.5*(u1^2+u2^2)^2+(Ba-u4x-u3y)^2+1/kappa*((u2x*u1-u1x*u2)*u3+(u2y*u1-u1y*u2)*u4)+(u3^2+u4^2)*(u1^2+u2^2)), Total energy
    0 | 18.7512
    0.000457999 | 18.7646
    0.000915999 | 18.7784
    0.001832 | 18.8072
    0.00366399 | 18.8694
    0.00732799 | 19.01
    0.014656 | 19.3416
    0.029312 | 20.1273
    0.0439679 | 20.9681
    0.0586239 | 21.7942
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  tbl3: Table "Probe Table 2.2"
    t | (u1x^2+u2y^2)/kappa^2-(u1^2+u2^2)+0.5*(u1^2+u2^2)^2, Superconducting energy
    0 | -150
    0.000457999 | -150
    0.000915999 | -150
    0.001832 | -150
    0.00366399 | -150
    0.00732799 | -149.999
    0.014656 | -149.997
    0.029312 | -149.988
    0.0439679 | -149.976
    0.0586239 | -149.96
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  tbl4: Table "Probe Table 2.3"
    t | (Ba-u4x-u3y)^2, Magnetic energy
    0 | 168.751
    0.000457999 | 168.765
    0.000915999 | 168.778
    0.001832 | 168.807
    0.00366399 | 168.869
    0.00732799 | 169.008
    0.014656 | 169.334
    0.029312 | 170.099
    0.0439679 | 170.912
    0.0586239 | 171.703
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  tbl5: Table "Probe Table 2.2.2"
    t | 1/kappa*((u2x*u1-u1x*u2)*u3+(u2y*u1-u1y*u2)*u4)+(u3^2+u4^2)*(u1^2+u2^2), Interaction energy
    0 | 4.04803e-08
    0.000457999 | 6.21121e-06
    0.000915999 | 2.27623e-05
    0.001832 | 8.64715e-05
    0.00366399 | 0.000331581
    0.00732799 | 0.00126084
    0.014656 | 0.00464301
    0.029312 | 0.0160945
    0.0439679 | 0.0318108
    0.0586239 | 0.0502943
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
Plots
  pg7: PlotGroup2D "Vortecies & Current density"
    data = dset3
    datasetintitle = off
    phaseintitle = off
    solutionintitle = on
    typeintitle = off
    descriptionintitle = on
    expressionintitle = off
    surf1: Surface "Vortecies" | expr = u1^2 + u2^2; descr = |\psi| - order parameter
    arws1: ArrowSurface "Super-Current density"
      expr = {Jsx, Jsy}
      descr = Super current density
      xnumber = 60
      ynumber = 60
      arrowlength = proportional
  pg4: PlotGroup2D "Vortecies"
    data = dset3
    datasetintitle = off
    phaseintitle = off
    solutionintitle = on
    typeintitle = off
    descriptionintitle = on
    expressionintitle = off
    surf1: Surface "Vortecies" | expr = u1^2+u2^2; descr = |\psi| - order parameter
  pg5: PlotGroup2D "Phase shift"
    data = dset3
    datasetintitle = off
    phaseintitle = off
    solutionintitle = on
    typeintitle = off
    descriptionintitle = on
    expressionintitle = off
    surf1: Surface | expr = atan2(u2,u1)/pi; unit = rad; descr = \phi - phase of order parameter
  pg6: PlotGroup2D "Magnetic field"
    data = dset3
    datasetintitle = off
    phaseintitle = off
    solutionintitle = on
    typeintitle = off
    descriptionintitle = on
    expressionintitle = off
    surf1: Surface | expr = -u3y+u4x; descr = B - magnetic field
  pg3: PlotGroup1D "Energy" | data = none; title = Energy vs timestep; xlabel = Time (s); ylabel = E - energy
    tblp1: Table "Etot"
      table = tbl2
      xaxisdata = auto
      plotcolumns = 2
      transform = none
      imagplot = off
      preprocy = linear
      scalingy = -1
      legends = Etot
    tblp5: Table "Esup" | table = tbl3; preprocy = linear; scalingy = -1; legends = Esup
    tblp6: Table "Emag" | table = tbl4; preprocy = linear; scalingy = -1; legends = Emag
    tblp7: Table "Eint" | table = tbl5; preprocy = linear; scalingy = -1; legends = Eint