// COMSOL Multiphysics 5.1.0.234 model "grr(r)_with_current.mph"
// Outline of the model tree

Parameters
  Tc = 18[K]  // Critical temperature
  T = 0  // Temperature
  SCw = 8  // SC width
  SCh = 8  // SC height
  sigma = 1  // bulk conductivity above Tcrit
  kappa = 4  // G-L parameter
  I = 0  // external current
  Ba = 0.73  // Applied magnetic field
  R = SCw/40  // pin radius
  w = SCw/160  // pin anullus width
  x01 = -1[m]  // 1st pin x-cord
  y01 = -3[m]  // 1st pin y-cord
  x02 = 0[m]
  y02 = -2[m]
  x03 = 1[m]
  y03 = -1[m]
  x04 = 2[m]
  y04 = 0[m]

Variables
  var1 "Variables 1"
    kappa2 = kappa^2
    Bc = Je*y  // current induced field
    Je = I/SCh  // uniform current density
    f = f1*f2*f3*f4  // pinning function
    f1 = tanh((sqrt((x-x01)^2+(y-y01)^2)-R)/w)  // 1st pinning site
    f2 = tanh((sqrt((x-x02)^2+(y-y02)^2)-R)/w)  // 2nd pinning site
    f3 = tanh((sqrt((x-x03)^2+(y-y03)^2)-R)/w)  // 3rd pinning site
    f4 = tanh((sqrt((x-x04)^2+(y-y04)^2)-R)/w)  // 4th pinning site

Probes
  dom1: Domain "Domain Probe 1" on domains 1
    type = integral
    expr = ((u1x^2+u2y^2)/kappa^2-(u1^2+u2^2)+0.5*(u1^2+u2^2)^2+(Ba-u4x-u3y)^2+1/kappa*((u2x*u1-u1x*u2)*u3+(u2y*u1-u1y*u2)*u4)+(u3^2+u4^2)*(u1^2+u2^2))
    descr = E
    table = tbl2

Coordinate systems
  sys1: Boundary "Boundary System 1" | coord = {x, y, t}; reversenormal = off

Geometry
  geom1 "Geometry 1" (2D, length unit m)
    r1: Rectangle | pos = {-0, 0}; type = solid; base = center; size = {SCw, SCh}
    b1: BezierPolygon "Indentation_right" (disabled)
      p = {{SCw/2, SCw/4, SCw/4, SCw/2}, {SCh/100, SCh/100, -SCh/100, -SCh/100}}
      degree = {1, 1, 1}
      w = {1, 1, 1, 1, 1, 1}
      type = open
    b4: BezierPolygon "Indentation_left1" (disabled)
      p = {{-SCw/2, -SCw/4, -SCw/4, -SCw/2}, {SCw/100, SCw/100, -SCw/100, -SCw/100}}
      degree = {1, 1, 1}
      w = {1, 1, 1, 1, 1, 1}
      type = open
    b5: BezierPolygon "Indentation_up" (disabled)
      p = {{-SCw/100, -SCw/100, SCw/100, SCw/100}, {SCh/2, SCh/4, SCw/4, SCw/2}}
      degree = {1, 1, 1}
      w = {1, 1, 1, 1, 1, 1}
      type = open
    b6: BezierPolygon "Indentation_down" (disabled)
      p = {{-SCw/100, -SCw/100, SCw/100, SCw/100}, {-SCh/2, -SCh/4, -SCw/4, -SCw/2}}
      degree = {1, 1, 1}
      w = {1, 1, 1, 1, 1, 1}
      type = open
    b7: BezierPolygon "Hexagon" (disabled)
      p = 
        {-SCw/2, -SCw/4, SCw/4, SCw/2, SCw/4, -SCw/4, -SCw/2}
        {0, SCw/4*sqrt(3), SCw/4*sqrt(3), 0, -SCw/4*sqrt(3), -SCw/4*sqrt(3), 0}
      degree = {1, 1, 1, 1, 1, 1}
      w = {1, 1, 1, 1, 1, 1, 1, 1, 1, 1, 1, 1}
      type = solid
    b8: BezierPolygon "Hexagon 1" (disabled)
      p = 
        {-SCw/8, -SCw/16, SCw/16, SCw/8, SCw/16, -SCw/16, -SCw/8}
        {0, SCw/16*sqrt(3), SCw/16*sqrt(3), 0, -SCw/16*sqrt(3), -SCw/16*sqrt(3), 0}
      degree = {1, 1, 1, 1, 1, 1}
      w = {1, 1, 1, 1, 1, 1, 1, 1, 1, 1, 1, 1}
      type = solid
    c4: Circle "defect1" (disabled) | pos = {-2, 2}; type = solid; base = center; r = 0.01
    c5: Circle "defect2" (disabled) | pos = {2, -2}; type = solid; base = center; r = 0.01
    c6: Circle "defect1.1" (disabled) | pos = {-2, -2}; type = solid; base = center; r = 0.01
    c7: Circle "defect2.1" (disabled) | pos = {2, 2}; type = solid; base = center; r = 0.01
    b9: BezierPolygon "Left metal contact" (disabled)
      p = {{-SCw/2, -SCw/1.999, -SCw/1.999, -SCw/2}, {SCh/2, SCh/2, -SCh/2, -SCh/2}}
      degree = {1, 1, 1}
      w = {1, 1, 1, 1, 1, 1}
      type = solid
    b10: BezierPolygon "right metal contact" (disabled)
      p = {{SCw/2, SCw/1.999, SCw/1.999, SCw/2}, {SCh/2, SCh/2, -SCh/2, -SCh/2}}
      degree = {1, 1, 1}
      w = {1, 1, 1, 1, 1, 1}
      type = solid
    fil1: Fillet (disabled) | point = r1(1) entities 4; radius = 0.5
    fil2: Fillet (disabled) | point = fil1(1) entities 5; radius = 0.5
    fil3: Fillet (disabled) | point = fil2(1) entities 5; radius = 0.5
    fil4: Fillet (disabled) | point = fil3(1) entities 1; radius = 0.5
    fin: Finalize "Form Union"
    cme1: CompositeEdges "Form Composite Edges 1" (disabled) | keepformesh = off
  part1 "Part 1" (2D, length unit m)

Materials
  mat1: Common "Material 1"
    def "Basic"
      electricconductivity = 3e3
  mat2: Common "Superconductor" on no domains
    def "Basic"
      kappa = 4
      sigma = 4
  mat3: Common "Metal" on no domains
    def "Basic"
      sigma = 3e3
      kappa = 10000000

Physics
  g: GeneralFormPDE on domains 1
    dependent variable u = {u1, u2, u3, u4, u5}
    Units.SourceTermQuantity = dimensionless
    gfeq1: GeneralFormPDE "TDGL equations" (default)
      f = {(u3x+u4y)*u2/kappa+2*(u2x*u3+u2y*u4)/kappa-(u3^2+u4^2)*u1+f*u1-(u1^2+u2^2)*u1, -(u3x+u4y)*u1/kappa-2*(u1x*u3+u1y*u4)/kappa-(u3^2+u4^2)*u2+f*u2-(u1^2+u2^2)*u2, (u1*u2x-u2*u1x)/kappa-(u1^2+u2^2)*u3, (u1*u2y-u2*u1y)/kappa-(u1^2+u2^2)*u4, u3x+u4y+u5}
      Ga = 
        {-u1x/kappa2, -u1y/kappa2}
        {-u2x/kappa2, -u2y/kappa2}
        {0, u4x-u3y-Ba-Bc}
        {-u4x+u3y+Ba+Bc, 0}
        {u3, u4}
      da = {1, 0, 0, 0, 0, 0, 1, 0, 0, 0, 0, 0, sigma, 0, 0, 0, 0, 0, sigma, 0, 0, 0, 0, 0, 0}
    zflx1: ZeroFluxBoundary "Vacuum boundary" (default)
    init1: init "Initial Values 1" (default)
      u1 = 1/sqrt(2)
      u2 = 1/sqrt(2)
      u3 = 0
      u4 = 0
      u1t = 0
      u2t = 0
      u3t = 0
      u4t = 0
      u5 = 0
      u5t = 0
      u6 = Bc
      u7 = 0
    flux1: FluxBoundary "Metallic contact - left" (disabled) on boundaries 1
      g = {0, 0, -Je-sigma*u3t, 0, 0}
      q = {0, 0, 0, 0, -1, 0, 0, 0, 0, -i, 0, 0, 0, 0, -x, 0, 0, 0, 0, 0, 0, 0, 0, 0, 0}
    flux2: FluxBoundary "Metallic contact - right" (disabled) on boundaries 4
      g = {0, 0, -Je+sigma*u3t, 0, 0}
      q = {0, 0, 0, 0, -1, 0, 0, 0, 0, -i, 0, 0, 0, 0, 1, 0, 0, 0, 0, 0, 0, 0, 0, 0, 0}

Mesh
  mesh1 "Mesh 1" (physics-controlled)
    size: MeshSizeDefault | hauto = 4

Studies
  std2 "Study 2"
    param1: Parametric "Sweep" (disabled) | sweeptype = filled; pname = I; plistarr = range(-3,0.5,3)
    time: Transient "Time Dependent" | tlist = range(0,1,200); initmethod = sol; initstudy = zero

Solver configurations
  sol1 "Solution 1" (study std2)
    v1: Variables "Dependent Variables 1"
    t1: Time "Time-Dependent Solver 1" | tlist = range(0,1,200)
      dDef: Direct
      fc1: FullyCoupled | linsolver = dDef

Datasets
  dset1: Solution | solution = sol1
  dset2: Solution "Probe Solution 2" | solution = sol1
  int1: Integral "Domain Probe 1" on domains 1 | data = dset2

Derived values
  pev1: EvalPoint "Domain Probe 1"
    data = int1
    table = tbl2
    expr = ((u1x^2+u2y^2)/kappa^2-(u1^2+u2^2)+0.5*(u1^2+u2^2)^2+(Ba-u4x-u3y)^2+1/kappa*((u2x*u1-u1x*u2)*u3+(u2y*u1-u1y*u2)*u4)+(u3^2+u4^2)*(u1^2+u2^2))

Tables
  tbl1: Table
    // Energy (((u1x^2+u2y^2)/kappa^2-(u1^2+u2^2)+0.5*(u1^2+u2^2)^2+(Ba-u4x-u3y)^2+1/kappa*((u2x*u1-u1x*u2)*u3+(u2y*u1-u1y*u2)*u4)+(u3^2+u4^2)*(u1^2+u2^2)))
    Time (s) | total energy | total energy | total energy
    0 | 38.4308 | 0 | 0
    0.1 | 56.4729 | 0 | 0
    0.2 | 71.3588 | 0 | 0
    0.3 | 87.4317 | 0 | 0
    0.4 | 104.038 | 0 | 0
    0.5 | 120.462 | 0 | 0
    0.6 | 136.204 | 0 | 0
    0.7 | 151.046 | 0 | 0
    0.8 | 164.731 | 0 | 0
    0.9 | 177.096 | 0 | 0
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  tbl2: Table "Probe Table 2"
    t | E, Domain Probe 1
    0 | 2.11919-1.25925e-23i
    0.000116394 | 2.12818-1.20225e-23i
    0.000232787 | 2.13888-1.14952e-23i
    0.000465575 | 2.16492-1.05418e-23i
    0.000931149 | 2.2282-9.03275e-24i
    0.0018623 | 2.37846-6.98063e-24i
    0.00279345 | 2.52718-5.74147e-24i
    0.00465575 | 2.79069-4.3569e-24i
    0.00633182 | 2.96805-3.66277e-24i
    0.00800788 | 3.10666-3.92241e-24i
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
Plots
  pg2: PlotGroup1D "energy" (disabled) | data = none
    tblp1: Table "Table Graph 1" | table = tbl1; xaxisdata = 1; plotcolumninput = manual; plotcolumns = 2
  pg4: PlotGroup2D "Vortecies"
    data = dset1
    datasetintitle = off
    phaseintitle = off
    solutionintitle = on
    typeintitle = off
    descriptionintitle = on
    expressionintitle = off
    surf1: Surface "Vortecies"
      expr = u1^2 + u2^2
      descr = |\psi| - order parameter
      typeintitle = off
      descriptionintitle = on
      unitintitle = off
    arws1: ArrowSurface "Current density" (disabled)
      expr = {((u1-i*u2)*(u1x+i*u2x)-(u1+i*u2)*(u1x-i*u2x))/2/i/kappa-(u1^2+u2^2)*u3-sigma*u3t+Je, ((u1-i*u2)*(u1y+i*u2y)-i*(u1+i*u2)*(u1y-i*u2y))/2/i/kappa-(u1^2+u2^2)*u4-sigma*u4t}
      descr = J - super-current density
      xnumber = 50
      ynumber = 50
      arrowlength = proportional
  pg5: PlotGroup2D "Magnetic field"
    data = dset1
    datasetintitle = off
    phaseintitle = off
    solutionintitle = on
    typeintitle = off
    descriptionintitle = on
    expressionintitle = off
    surf1: Surface "Magnetic field"
      expr = u4x-u3y
      descr = B - magnetic field
      typeintitle = off
      descriptionintitle = on
      unitintitle = off
      wireframe = off
    arws1: ArrowSurface "Current density"
      expr = {((u1-i*u2)*(u1x+i*u2x)-(u1+i*u2)*(u1x-i*u2x))/2/i/kappa-(u1^2+u2^2)*u3-sigma*u3t+Je, ((u1-i*u2)*(u1y+i*u2y)-i*(u1+i*u2)*(u1y-i*u2y))/2/i/kappa-(u1^2+u2^2)*u4-sigma*u4t}
      xnumber = 40
      ynumber = 40
  pg6: PlotGroup2D "Phase"
    data = dset1
    datasetintitle = off
    phaseintitle = off
    solutionintitle = on
    typeintitle = off
    descriptionintitle = on
    expressionintitle = off
    surf1: Surface "Phase"
      expr = atan2(u2,u1)/pi
      unit = rad
      descr = \phi =arg(\psi) - phase of order parameter
      typeintitle = off
      descriptionintitle = on
      unitintitle = off
      wireframe = off
  pg7: PlotGroup2D "Magnetic vector potential"
    data = dset1
    datasetintitle = off
    phaseintitle = off
    solutionintitle = on
    typeintitle = off
    descriptionintitle = on
    expressionintitle = off
    arws1: ArrowSurface "Vector potential"
      expr = {u3, u4}
      descr = A - magnetic vector potantial
      typeintitle = off
      descriptionintitle = on
      xnumber = 30
      ynumber = 30
      arrowlength = logarithmic
  pg8: PlotGroup1D "Energy" | data = none; title = Energy; xlabel = Time (s); ylabel = E
    tblp1: Table "Energy" | table = tbl2; xaxisdata = auto; imagplot = off; preprocy = linear; scalingy = -1